# Вариант 6
# Нахождение значения выражения с точностью до 31 знака после точки с помощью символьного выражения float
(cos(6) + sqrt(log(6.7, 4)))/3^acot(5.3) float, 31 → 1.736658080504159428779884487893
# Упрощение выражений с помощью символьноого выражения simplify
10/(x + 3) - 3/(x + 7)^2 simplify → 10/(x + 3) - 3/(x + 7)^2
(-36 - 3*x + 23*x^2 - 9*x^3 + x^4)/(24 - 2*x - 5*x^2 + x^3) simplify → (x + 1)*(x - 3)/(x + 2)
d^4/dx^4((2*(-4)*x + x^2)^-3) simplify → 144*(21*x^4 - 336*x^3 + 2304*x^2 - 7680*x + 10240)/(x^7*(x - 8)^7)
d^2/dx^2(cos(x)^2 - 2*cos(x)*sin(2*x) - sin(3*x)^2) simplify → 36*sin(3*x)^2 + 9*sin(3*x) + 4*sin(x)^2 + sin(x) - 20
# Раскрытие скобок с помощью символьного выражения expand
(x + 4*a)^3*(3*y + b)^5 expand → 64*a^3*b^5 + 960*a^3*b^4*y + 5760*a^3*b^3*y^2 + 17280*a^3*b^2*y^3 + 25920*a^3*b*y^4 + 15552*a^3*y^5 + 48*a^2*b^5*x + 720*a^2*b^4*x*y + 4320*a^2*b^3*x*y^2 + 12960*a^2*b^2*x*y^3 + 19440*a^2*b*x*y^4 + 11664*a^2*x*y^5 + 12*a*b^5*x^2 + 180*a*b^4*x^2*y + 1080*a*b^3*x^2*y^2 + 3240*a*b^2*x^2*y^3 + 4860*a*b*x^2*y^4 + 2916*a*x^2*y^5 + b^5*x^3 + 15*b^4*x^3*y + 90*b^3*x^3*y^2 + 270*b^2*x^3*y^3 + 405*b*x^3*y^4 + 243*x^3*y^5
-3 + cos(5*x) + cos(7*x) + sin(2*x) coeffs → [cos(x)^7 - 21*cos(x)^5*sin(x)^2 + cos(x)^5 + 35*cos(x)^3*sin(x)^4 - 10*cos(x)^3*sin(x)^2 - 7*cos(x)*sin(x)^6 + 5*cos(x)*sin(x)^4 + 2*cos(x)*sin(x) - 3]
# Разложение числа еа простые множители с помощью factor
402696 factor → 2^3*3^2*7*17*47
# Разложение многочлена на множители с помощью factor
100 - 255*x + 207*x^2 - 54*x^3 factor → -(6*x - 5)*(3*x - 5)*(3*x - 4)
# Выражение многочлена относительно переменной с с помощью collect
(d - c)*(c - e)*(x - y)*(y - c) collect, c → (x - y)*c^3 + (-(x - y)*(d + y + e))*c^2 + (x - y)*(e*(d + y) + d*y)*c - d*y*e*(x - y)
# Упрощение производной с помощью simplify
d/dx(x/(cos(x^2) + sin(x^2))) simplify → (cos(x^2) + sin(x^2) - 2*x^2*cos(x^2) + 2*x^2*sin(x^2))/(sin(2*x^2) + 1)
d/dx(xsin(xln(x))) simplify → d/dx(xln(x))*{
    x0 ← xln(x)
    d/dx0(xsin(x0))
}
# Нахождение и упрощение интеграла с помощью simplify
integral(sin(x)^-6, x) simplify → -(cos(5*x) - 5*cos(3*x) + 10*cos(x))/(30*sin(x)^5)
integral(ln(x + 2)/sqrt(1 + x), x) simplify → 4*atan(sqrt(x + 1)) + 2*ln(x + 2)*sqrt(x + 1) - 4*sqrt(x + 1)
# Задание функций
f(a) := cos(2*a)
u(b) := cos(b)
x := f(a)  # error: This variable is undefined.
y := u(b)  # error: This variable is undefined.
# Расчет производной по переменной a
d/da((3 + x^2*y^2)/(y^2 + 7*x^2) - 2*x*y) → 4*sin(2*a)*cos(b) + 28*cos(2*a)*sin(2*a)*(cos(2*a)^2*cos(b)^2 + 3)/(7*cos(2*a)^2 + cos(b)^2)^2 - 4*cos(2*a)*sin(2*a)*cos(b)^2/(7*cos(2*a)^2 + cos(b)^2)
# Расчет производной по переменной b
d/db(-2*x*y + (3 + x^2*y^2)/(y^2 + 7*x^2)) → 2*cos(2*a)*sin(b) + 2*cos(b)*sin(b)*(cos(2*a)^2*cos(b)^2 + 3)/(7*cos(2*a)^2 + cos(b)^2)^2 - 2*cos(2*a)^2*cos(b)*sin(b)/(7*cos(2*a)^2 + cos(b)^2)
# Посчет производной по переменной b
a := π/8
b := 3*π/8
2*cos(2*a)*sin(b) + 2*cos(b)*sin(b)*(cos(2*a)^2*cos(b)^2 + 3)/(7*cos(2*a)^2 + cos(b)^2)^2 = 1.47
# Нахождение корней уравнения третьей степени с помощью root
f(x) := -2*x^3 + 11*x^2 + 8*x + 1
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x_1 := -0.5
z_1 := root(f(x_1), x_1)
f(z_1) = 0
z_1 = -0.5
x_2 := 0
z_2 := root(f(x_2), x_2)
f(z_2) = 2.62228e-11
z_2 = -0.162278
x_3 := 6
z_3 := root(f(x_3), x_3)
z_3 = 6.16228
f(z_3) = -4.26326e-14
# Нахождение неопределенного интеграла посредством разложения в степенной ряд спомощью series
f_1(x) := cos(x^2)
f_1(x) series, 6 → cos(1) + 4*a^2*sin(1) - a^4*(8*cos(1) + 16*sin(1)/3)
integral(cos(1) + 4*a^2*sin(1) - a^4*(8*cos(1) + 16*sin(1)/3), x) → cos(2*a)*(cos(1) + π^2*sin(1)/16 - π^4*(8*cos(1) + 16*sin(1)/3)/4096)
# Нахождение определителя и обратной матрицы
A := [1, 4, 9; 3, 7, 0; 2, 1, 3]
A^-1 = [-0.184211, 0.0263158, 0.552632; 0.0789474, 0.131579, -0.236842; 0.0964912, -0.0614035, 0.0438596]
|A| = -114
# Задание 7.2
# Нахождение значения выражения с точностью до 40 знака после точки с помощью символьного выражения float
(cos(6) + sqrt(log(6.7, 4)))/3^acot(5.3) float, 40 → 1.73665808050415942877988448789289897318
# Нахождение определенного интеграла на промежутке [2;3] посредством разложения в степенной ряд спомощью series
f_1(x) := cos(x^2)
f_1(x) series, 6 → cos(1) + 4*a^2*sin(1) - a^4*(8*cos(1) + 16*sin(1)/3)
integral(cos(1) + 4*a^2*sin(1) - a^4*(8*cos(1) + 16*sin(1)/3), a = 2 .. 3) → -1683*cos(1)/5 - 2996*sin(1)/15
# Задание 7.3
# Построение графиков трех функций
y_1(x) := sin(x)^2*e^(-x/3)
y_2(x) := e^(-x/9)*sin(x)
y_3(x) := x^2*cos(x)
x := -2, -1.9 .. 2
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# Задание 7.4
# Построение параметрически заданного графика
x(t) := 4*cos(2*t)*cos(5*t)
y(t) := 2*sin(3*t)*cos(3*t)
t := 0, 0.1 .. π
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# Задание 7.5
# Построение графика в полярных координат
ϕ_1(t) := 4*sin(2*t)
ϕ_2(t) := t*cos(t/5)
t := 0 .. 2*π
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# Задание 7.6
# Построение трехмерного графика
f(x, y) := y*cos(x^2)
# [component: inputs f]
# Задание 7.7
# Нахождение решения трансцендентных уравнений с помощью директивы Given и функции Find
g(x) := ln(x) - sin(x)
x := 0 .. 3
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x := 2.3
Given
g(x) == 0
Find(x) = 2.21911
